ORIGIN := 1  # Нумерация во всех массивах начинается с единицы
# 1 | 2
aa := 1000  # размер пролета
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Area := 225  # площади стержней
ModUpr := 72000  # модуль упругостей материала стержней
# Сквозная нумерация
# возможных перемещений узлов,
# нули соответствуют закреплению
# Узловые силы в направлении
# возможных перемещений
# Координаты узлов X, Y
Force := [0; 0; 0; 0; 0; -9000; 0; 0; 0]
3
4
5
6
NodeCoord := [aa, aa; 2*aa, aa; 0, 0; aa, 0; 2*aa, 0; 3*aa, 0]
NodeV := [1, 2; 3, 4; 0, 0; 5, 6; 7, 8; 9, 0]
# Матрица стержней,
# номера узлов i и j
# причем i < j всегда!
LinkNodes := [1, 2; 1, 3; 1, 4; 1, 5; 2, 5; 2, 6; 3, 4; 4, 5; 5, 6]
N_Link := rows(LinkNodes) = 9  # Количество стержней фермы
N_Nodes := rows(NodeV) = 6  # Количество узлов фермы
N_DOF := max(NodeV) = 9
# Количество степеней свободы
# (число возможных перемещений)
i := 1 .. N_Link  # Цикл i - перебор номеров всех  стержней фермы
# Вычисление длин каждого стержня через координаты узлов - его концов
LinkLength[i] := sqrt((NodeCoord[LinkNodes[i, 2], 1] - NodeCoord[LinkNodes[i, 1], 1])^2 + 0 + (NodeCoord[LinkNodes[i, 2], 2] - NodeCoord[LinkNodes[i, 1], 2])^2)
LinkLength = [1000; 1414.21; 1000; 1414.21; 1000; 1414.21; 1000; 1000; 1000]
Kmest[i] := Area*ModUpr/LinkLength[i]*[1, -1; -1, 1]
# Вычислением матрицы жесткости стержня
# в местной системе координат
Kmest[1] = [16200, -16200; -16200, 16200]
# Вычисление направляющих косинусов углов между осью i-го стержня и осями глобальной декартовой системы координат
# i,1 - с осью X
# i,2 - с осью Y
Kmest[2] = [11455.1, -11455.1; -11455.1, 11455.1]
Lambda[i, 1] := (NodeCoord[LinkNodes[i, 2], 1] - NodeCoord[LinkNodes[i, 1], 1])/LinkLength[i]
Lambda[i, 2] := (NodeCoord[LinkNodes[i, 2], 2] - NodeCoord[LinkNodes[i, 1], 2])/LinkLength[i]
# Формирование матрицы направляющих косинусов для i-го стержня
λ0[i] := [Lambda[i, 1], Lambda[i, 2]]
λ0[1] = [1, 0]
λ0[2] = [-0.707107, -0.707107]
λ0[3] = [0, -1]
λ0[4] = [0.707107, -0.707107]
λ0[5] = [0, -1]
λ0[6] = [0.707107, -0.707107]
λ0[7] = [1, 0]
λ0[8] = [1, 0]
λ0[9] = [1, 0]
# Формирование матрицы преобразования координат из глобальной в местную
λ[i] := [Lambda[i, 1], Lambda[i, 2], 0, 0; 0, 0, Lambda[i, 1], Lambda[i, 2]]
# Формирование в блочной форме матрицы жесткости i-го стержня в глобальной СК
Kobs[i] := Area*ModUpr/LinkLength[i]*stack(augment(transpose(λ0[i])*λ0[i], -(transpose(λ0[i])*λ0[i])), augment(-(transpose(λ0[i])*λ0[i]), transpose(λ0[i])*λ0[i]))
# Формирование матрицы индексов степеней свободы обоих узлов  каждого i-го элемента
Kobs[2] = [
    5727.56, 5727.56, -5727.56, -5727.56;
    5727.56, 5727.56, -5727.56, -5727.56;
    -5727.56, -5727.56, 5727.56, 5727.56;
    -5727.56, -5727.56, 5727.56, 5727.56
]
Index[i] := [NodeV[LinkNodes[i, 1], 1], NodeV[LinkNodes[i, 1], 2], NodeV[LinkNodes[i, 2], 1], NodeV[LinkNodes[i, 2], 2]]
# Формирование сокращенной матрицы жесткости всей конструкции
# в общей системе координат только для активных степеней свободы (ненулевых перемещений)
Index[1] = [1, 2, 3, 4]
K :=
    for i ∈ 1 .. N_DOF
        for j ∈ 1 .. N_DOF
            K[i, j] ← 0
    for e ∈ 1 .. N_Link
        for i ∈ 1 .. 4
            A ← Index[e][:, i][1]
            if A == 0
                {
                    continue
                }
            for j ∈ 1 .. 4
                B ← Index[e][:, j][1]
                if B == 0
                    {
                        continue
                    }
                K[B, A] ← K[B, A] + Kobs[e][i, j]
    K
Index[2] = [1, 2, 0, 0]
Index[3] = [1, 2, 5, 6]
Index[4] = [1, 2, 7, 8]
Index[5] = [3, 4, 7, 8]
# здесь i и j - локальные переменные для перебора матрицы индексов степеней свободы для каждого из узлов элемента с номером "е"
Index[6] = [3, 4, 9, 0]
Index[7] = [0, 0, 5, 6]
Index[8] = [5, 6, 7, 8]
Index[9] = [7, 8, 9, 0]
K = [
    27655.1, 0, -16200, 0, 0, 0, -5727.56, 5727.56, 0;
    0, 27655.1, 0, 0, 0, -16200, 5727.56, -5727.56, 0;
    -16200, 0, 21927.6, -5727.56, 0, 0, 0, 0, -5727.56;
    0, 0, -5727.56, 21927.6, 0, 0, 0, -16200, 5727.56;
    0, 0, 0, 0, 32400, 0, -16200, 0, 0;
    0, -16200, 0, 0, 0, 16200, 0, 0, 0;
    -5727.56, 5727.56, 0, 0, -16200, 0, 38127.6, -5727.56, -16200;
    5727.56, -5727.56, 0, -16200, 0, 0, -5727.56, 21927.6, 0;
    0, 0, -5727.56, 5727.56, 0, 0, -16200, 0, 21927.6
]
# Из решения системы линейных уравнений находим перемещений узлов фермы в общей системе координат (в этой матрице применена сквозная нумерация перемещений!)
Va := lsolve(K, Force) = [0.679012; -1.72658; 0.493827; -0.955882; 0.37037; -2.28213; 0.740741; -1.14107; 0.925926]
# Построение матрицы перемещений каждого узла фермы в формате трех возможных поступательных перемещений - вдоль каждой из осей глобальной СК
Vi :=
    for e ∈ 1 .. N_Nodes
        for a ∈ 1 .. 2
            q ← NodeV[e, a]
            V[e, a] ← 0 if q == 0
            V[e, a] ← Va[q] otherwise
    V
# каждая строка - узел
Vi = [0.679012, -1.72658; 0.493827, -0.955882; 0, 0; 0.37037, -2.28213; 0.740741, -1.14107; 0.925926, 0]
# Построение в блочной форме матрицы перемещений Vij для каждого стержня фермы, как соединение матрицы перемещений отдельных узлов (результат 6 перемещений на каждый стержень, все в глобальной СК)
Vij :=
    for e ∈ 1 .. N_Link
        W[e] ← transpose(augment(transpose(transpose(Vi)[:, LinkNodes[e, 1]]), transpose(transpose(Vi)[:, LinkNodes[e, 2]])))
    W
Vij[1] = [0.679012; -1.72658; 0.493827; -0.955882]
Vij = [
    [0.679012; -1.72658; 0.493827; -0.955882]; [0.679012; -1.72658; 0; 0]; [0.679012; -1.72658; 0.37037; -2.28213]; [0.679012; -1.72658; 0.740741; -1.14107]; [0.493827; -0.955882; 0.740741; -1.14107]; [0.493827; -0.955882; 0.925926; 0]; [0; 0; 0.37037; -2.28213]; [0.37037; -2.28213; 0.740741; -1.14107]; [0.740741; -1.14107; 0.925926; 0]
]
# Вычисление узловых перемещений стержня в местной системе координат
# (с использованием матрицы преобразований лямбда), результат - два перемещения на каждый стержень
V_[i] := λ[i]*Vij[i]
# Вычисление матрицы узловых сил для каждого стержня фермы
# (в местной системе координат)
P_[i] := Kmest[i]*V_[i]
P[i, 1] := P_[i][1]
P[i, 2] := P_[i][2]
# -3000.0
# -8485.3
# 9000.0
# -4242.6
# 3000.0
# -4242.6
# 6000.0
# 6000.0
# 3000.0
P = [
    3000, -3000;
    8485.28, -8485.28;
    -9000, 9000;
    4242.64, -4242.64;
    -3000, 3000;
    4242.64, -4242.64;
    -6000, 6000;
    -6000, 6000;
    -3000, 3000
]
